# OpenSim document version 40500
InverseKinematicsTool subject01:
  model_file: OpenSim/models/Rajagopal/Scaled_Rajagopal.osim
  accuracy: 1e-5
  time_range: 1.749044e9 1.749044e9
  output_motion_file: ../recordings/IK/subject01_static.mot
  marker_file: ../recordings/skeleton_ZED_2i_keypoints_subject00_static.trc
  IKTaskSet:
    IKMarkerTask STEREOCAMERA_JOINT_NECK: apply=true weight=1
    IKMarkerTask STEREOCAMERA_JOINT_RIGHT_CLAVICLE: apply=true weight=1
    IKMarkerTask STEREOCAMERA_JOINT_LEFT_CLAVICLE: apply=true weight=1
    IKMarkerTask STEREOCAMERA_JOINT_RIGHT_SHOULDER: apply=true weight=1
    IKMarkerTask STEREOCAMERA_JOINT_LEFT_SHOULDER: apply=true weight=1
    IKMarkerTask STEREOCAMERA_JOINT_RIGHT_ELBOW: apply=true weight=1
    IKMarkerTask STEREOCAMERA_JOINT_LEFT_ELBOW: apply=true weight=1
    IKMarkerTask STEREOCAMERA_JOINT_LEFT_WRIST: apply=true weight=1
    IKMarkerTask STEREOCAMERA_JOINT_RIGHT_WRIST: apply=true weight=1
    IKMarkerTask STEREOCAMERA_JOINT_SPINE_3: apply=true weight=1
    IKMarkerTask STEREOCAMERA_JOINT_SPINE_2: apply=true weight=1
    IKMarkerTask STEREOCAMERA_JOINT_SPINE_1: apply=true weight=1
    IKMarkerTask STEREOCAMERA_JOINT_PELVIS: apply=true weight=1
    IKMarkerTask STEREOCAMERA_JOINT_RIGHT_HIP: apply=true weight=1
    IKMarkerTask STEREOCAMERA_JOINT_LEFT_HIP: apply=true weight=1
