# OpenSim document version 40500
InverseKinematicsTool subject00:
  model_file: /home/raquel/Documents/ZED/body tracking/OpenSim/models/Rajagopal/Rajagopal_scaled_subject00.osim
  accuracy: 1e-5
  time_range: 1.749651e9 1.749651e9
  output_motion_file: /home/raquel/Documents/ZED/body tracking/recordings/subject00/IK/stereocamera_static.mot
  marker_file: /home/raquel/Documents/ZED/body tracking/recordings/subject00/stereocamera_static.trc
  IKTaskSet:
    IKMarkerTask JOINT_NECK: apply=true weight=1
    IKMarkerTask JOINT_RIGHT_CLAVICLE: apply=true weight=1
    IKMarkerTask JOINT_LEFT_CLAVICLE: apply=true weight=1
    IKMarkerTask JOINT_RIGHT_SHOULDER: apply=true weight=1
    IKMarkerTask JOINT_LEFT_SHOULDER: apply=true weight=1
    IKMarkerTask JOINT_RIGHT_ELBOW: apply=true weight=1
    IKMarkerTask JOINT_LEFT_ELBOW: apply=true weight=1
    IKMarkerTask JOINT_LEFT_WRIST: apply=true weight=1
    IKMarkerTask JOINT_RIGHT_WRIST: apply=true weight=1
    IKMarkerTask JOINT_SPINE_3: apply=true weight=1
    IKMarkerTask JOINT_SPINE_2: apply=true weight=1
    IKMarkerTask JOINT_SPINE_1: apply=true weight=1
    IKMarkerTask JOINT_PELVIS: apply=true weight=1
    IKMarkerTask JOINT_RIGHT_HIP: apply=true weight=1
    IKMarkerTask JOINT_LEFT_HIP: apply=true weight=1
